x1(y1) := cos(y1 + 1)/2
f(y) := y^4 - 1
y2(x2) := -0.4 - sin(x2)
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f1(x, y) := sin(x + y) - 1.2*x
f2(x, y) := x^2 + y^2 - 1
d/dx(f1(x, y)) → cos(x + y) - 1.2
d/dx(f2(x, y)) → 2*x
d/dy(f2(x, y)) → 2*y
d/dy(f1(x, y)) → cos(x + y)
g(a, b) := 0.34*e^(-4.8*b) - 0.34*a*e^(-4.8*b) + 0.34*a - 0.33
g2(a, b) := 0.34*e^(-5.9*b) - 0.34*a*e^(-5.9*b) + 0.34*a - 0.3
d/da(g2(a, b)) → -0.34*e^(-5.9*b) + 0.34
d/da(g(a, b)) → -0.34*e^(-4.8*b) + 0.34
d/db(g2(a, b)) → -2.006*e^(-5.9*b) + 2.006*a*e^(-5.9*b)
d/db(g(a, b)) → -1.632*e^(-4.8*b) + 1.632*a*e^(-4.8*b)
